/prep7
! Turn off shape checking because checks already performed inside WB mesher.
! See help system for more information.
SHPP,OFF,,NOWARN
/nolist
etcon,set             ! allow ANSYS to choose best KEYOP's for 180x elements
/com,*********** Nodes for the whole assembly ***********
nblock,3,,651
(1i9,3e20.9e3)
        1     1.059999987E+02     1.000000047E+00     6.938893904E-14
        2     1.060000000E+02     4.600000024E+00     6.938893904E-14
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-1
/wb,elem,start            !  set before creation of elements
/com,*********** Elements for Body 1 "Midsurface - Solid\Midsurface111" ***********
et,1,181
keyo,1,3,2
eblock,19,solid,,523
(19i9)
        1        1        1        1        0        0        0        0        4        0        1        1        2        4        3
        1        1        1        1        0        0        0        0        4        0        2        3        4        6        5
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-1
!Material Id = {C4188018-F090-45CA-90DC-F33445BE2FB4}
/wb,elem,end               !  done creating elements
/com,*********** Send User Defined Coordinate System(s) ***********
local,12,1,0.,0.,0.,90.,0.,90.
csys,0
toffst,273.15,  ! Temperature offset from absolute zero
/com,*********** Set Reference Temperature ***********
tref,22.
/wb,mat,start              !  starting to send materials
/com,*********** Send Materials ***********
MP,EX,1,191000,	! tonne s^-2 mm^-1
MP,NUXY,1,0.3,
MP,DENS,1,7.85e-09,	! tonne mm^-3

/wb,mat,end                !  done sending materials
/com,*********** Send Sheet Properties ***********
sectype,1,shell
secdata,2.
secoff,mid

!************************* Model Summary ********************
!Midsurface - Solid\Midsurface111,	304 Stainless Steel,	matid,	1
!************************* End Model Summary ********************
! get the diagonal of the bounding box. Needed later for other things
*get,_xmin,node,,mnloc,x
*get,_ymin,node,,mnloc,y
*get,_zmin,node,,mnloc,z
*get,_xmax,node,,mxloc,x
*get,_ymax,node,,mxloc,y
*get,_zmax,node,,mxloc,z
_ASMDIAG=(_xmax-_xmin)*(_xmax-_xmin)+(_ymax-_ymin)*(_ymax-_ymin)+(_zmax-_zmin)*(_zmax-_zmin)
_ASMDIAG=SQRT(_ASMDIAG)
/wb,contact,start          !  starting to send contact
/wb,contact,end            !  done creating contacts
/com,*********** Send Named Selection as Node Component ***********
CMBLOCK,INNER_EDGE,NODE,       11
(8i10)
       540       541       542       543       544       545       546       547
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/com,*********** Send Named Selection as Node Component ***********
CMBLOCK,BLADE_SIDE,NODE,       64
(8i10)
         1         2        11        12        13        18        19        24
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
/com,*********** Send Named Selection as Node Component ***********
CMBLOCK,BLADE_TOP_BOTTOM,NODE,       24
(8i10)
         1         3         5         7         9        11        91        92
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
/com,*********** Send Named Selection as Node Component ***********
CMBLOCK,OUTER_EDGE,NODE,       13
(8i10)
        11       187       212       214       531       532       533       534
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/com,*********** Send Named Selection as Node Component ***********
CMBLOCK,HOLE    ,NODE,       11
(8i10)
       540       541       542       543       544       545       546       547
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/golist
/wb,load,start             !  starting to send loads
/com,*********** Fixed Supports ***********
CMBLOCK,_FIXEDSU,NODE,       11
(8i10)
       540       541       542       543       544       545       546       547
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